<?xml version="1.0" encoding="UTF-8"?>
<Lems xmlns="http://www.neuroml.org/lems/0.9.0"> >

    <ComponentType name="Base"/>

    <ComponentType name="Bar" extends="Base" >
        <Parameter name="p0"/>
    </ComponentType>

    <ComponentType name="Baz" extends="Bar">
        <Parameter name="p1"/>
    </ComponentType>

    <ComponentType name="Foo" extends="Base">
        <Child type="Bar"/>
    </ComponentType>

</Lems>
